# Find resistor equivalence from measurements
hΩ := kg/(m^4*s)
# Function to calculate the pipe and appliance resistances for a given measurement.
R(P_main, P_app, F) :=
    R_tot ← P_main/F
    P_pipe ← P_main - P_app
    R_pipe ← P_pipe/F
    R_app ← P_app/F
    [R_pipe; R_app; R_tot]  # Total resistance in the circuit.
# The pressure difference across the pipe.
# The calculated resistance of the pipe.
# The calculated resistance of the appliance.
# The return values.
R_pipe(matrix) := matrix[0]
R_app(matrix) := matrix[1]
R_tot(matrix)[2]
percent(a, b) := |a - b|/((a + b)/2)
# 20230921_1235_toilet_test_big_10:
P_main_t1 := 3.977952 bar
P_app_t1 := 3.739761 bar
F_main_t1 := 7.442367 L/min
R_t1 := R(P_main_t1, P_app_t1, F_main_t1) = [192028423; 3.01498e9; 3.20701e9] hΩ
# 20230921_1235_toilet_test_big_20:
P_main_t2 := 3.975617 bar
P_app_t2 := 3.737753 bar
F_main_t2 := 7.428195 L/min
R_t2 := R(P_main_t2, P_app_t2, F_main_t2) = [192130659; 3.01911e9; 3.21124e9] hΩ
# 20230921_1243_toilet_test_big_30
P_main_t3 := 3.974542 bar
P_app_t3 := 3.736347 bar
F_main_t3 := 7.426008 L/min
R_t3 := R(P_main_t3, P_app_t3, F_main_t3) = [192454681; 3.01886e9; 3.21132e9] kg/(m^4*s)
# 20230918_1129_steady_half_show_steady
P_main_show := 3.975801 bar
P_app_show := 3.726977 bar
F_main_show := 7.775813 L/min
R.show := R(P_main_show, P_app_show, F_main_show) = [191998444; 2.87582e9; 3.06782e9] hΩ
# The resistance of the half shower test and the toilet test gives approximately the same pipe resistances.
R_pipe(R_t1) = 192028423 hΩ
R_pipe(R_t2) = 192130659 hΩ
R_pipe(R_t3) = 192454681 hΩ
R_pipe(R.show) = 191998444 hΩ
# Percentile difference between the pipe resistance measured from the toilet and the one measured from the shower at half capacity.
percent(R_pipe(R_t1), R_pipe(R.show)) = 0.000156129
percent(R_pipe(R_t2), R_pipe(R.show)) = 0.000688386
percent(R_pipe(R_t3), R_pipe(R.show)) = 0.00237343
# The biggest difference is between the measured pipe resistance of the third toilet reading.
# In order to check that the resistance is sound, the flow of the measured in the third toilet test is used in conjunction with the shower test pipe resistance to obtain a pressure difference accross the pipe.
P_pipe_test := R_pipe(R.show)*F_main_t3 = 23763 Pa
# This is compared to the pressure measured across the pipe in the third toilet test. The two values should be very close to similar.
P_pipe_t3 := P_main_t3 - P_app_t3 = 23819.5 Pa
|P_pipe_test - P_pipe_t3| = 56.4669 Pa
percent(P_pipe_t3, P_pipe_test) = 0.00237343
# As the values are so close, they can be considered the same. Therefore the pipe resistances calculated from one test can be used to determine the resistance of the pipes in the system.
P - [P_main_t - P_app_t; P_app_t; P_main_t] =  # error: This variable is undefined. Check that the label is set correctly.
P_main_t/R_show - F_main_t =  # error
